# [Excel component]
    excel["A1"] := READEXCEL(".\LOG.xlsx", "LOG!A1:A433")
    mass := excel["A1:A433"]
x := 0, 1 .. 433
f(x) := mass[x]
# [plot: f(x) vs x]
max(mass) = 245.45
a[0, 0] := max(mass) = 245.45
a[1, 0] := 0
a[2, 0] := 210
a[0, 1] := 0
a[1, 1] := 300
a[2, 1] := 75
a[□, 2] := 10  # error: Отсутствует элемент или выражение.
a[1, 2] := 0
a[2, 2] := 15
a = [245.45, 0, 0; 0, 300, 0; 210, 75, 15]
